// COMSOL Multiphysics 5.4.0.225 model "poissons_equation.mph"
// Outline of the model tree

Parameters
  width = 100[cm]
  height = 30[cm]
  youngs_modulus = 210[GPa]
  poissons_ratio = 0.33

Geometry
  geom1 "Geometry 1" (2D, length unit m)
    r1: Rectangle | base = center; size = {width, height}
    fin: Finalize "Form Union"

Materials
  mat1: Common "Material 1" on all domains
    def "Basic"
      youngsmodulus = youngs_modulus
      poissonsratio = poissons_ratio
      density = 1000

Physics
  solid: SolidMechanics on all domains
    dependent variable u = {u, v, w}
    Type2D.Type2D = PlaneStrain
    StructuralTransientBehavior.StructuralTransientBehavior = Quasistatic
    lemm1: LinearElasticModel "Linear Elastic Material 1" (default)
      SolidModel = Isotropic
      AnisotropicOption = AnisotropicVo
      Evector_mat = from_mat
      E_mat = from_mat
    free1: Free (default)
    init1: init "Initial Values 1" (default)
    fix1: Fixed "Fixed Constraint 1" on points 1
    disp1: Displacement0 "Prescribed Displacement 1" on points 3 | Direction = {0, 1, 0}; U0 = {0, 0, 0}
    bndl1: BoundaryLoad on boundaries 3 | LoadType = ForceLength; FperLength = {0, -1000, 0}; coordinateSystem = sys1

Mesh
  mesh1 "Mesh 1" (physics-controlled)

Studies
  std1 "Study 1"
    stat: Stationary

Solver configurations
  sol1 "Solution 1" (study std1)
    v1: Variables "Dependent Variables 1"
    s1: Stationary "Stationary Solver 1"
      dDef: Direct
      fc1: FullyCoupled | linsolver = dDef

Datasets
  dset1: Solution | solution = sol1

Plots
  pg1: PlotGroup2D "Stress (solid)" | data = dset1
    surf1: Surface | expr = solid.mises
      def: Deform "Deformation" | expr = {u, v}; descr = Displacement field