// COMSOL Multiphysics 5.4.0.225 model "task2.mph"
// Outline of the model tree

Parameters
  a = 20[m^-2]
  w1 = 3[m^-1]
  w2 = 2[m^-1]
  lx = 2[cm]
  ly = 3[cm]

Geometry
  geom1 "Geometry 1" (2D, length unit m)
    r1: Rectangle | size = {lx, ly}
    fin: Finalize "Form Union"

Physics
  c: CoefficientFormPDE on all domains
    dependent variable u
    cfeq1: CoefficientFormPDE (default) | c = {1, 0, 0, 1}; f = a*cos(w1*pi*x)*sin(w2*pi*y); da = 1
    zflx1: ZeroFluxBoundary "Zero Flux 1" (default)
    init1: init "Initial Values 1" (default)
    dir1: DirichletBoundary "Dirichlet Boundary Condition 1" on boundaries 1 | r = y^2/1[m^2]
    dir2: DirichletBoundary "Dirichlet Boundary Condition 2" on boundaries 4 | r = 1
    dir3: DirichletBoundary "Dirichlet Boundary Condition 3" on boundaries 2 | r = x^2/1[m^2]
    dir4: DirichletBoundary "Dirichlet Boundary Condition 4" on boundaries 3 | r = 1

Mesh
  mesh1 "Mesh 1" (physics-controlled)

Studies
  std1 "Study 1"
    stat: Stationary

Solver configurations
  sol1 "Solution 1" (study std1)
    v1: Variables "Dependent Variables 1"
    s1: Stationary "Stationary Solver 1"
      dDef: Direct
      fc1: FullyCoupled | linsolver = dDef

Datasets
  dset1: Solution | solution = sol1

Plots
  pg1: PlotGroup2D "2D Plot Group 1" | data = dset1
    surf1: Surface | expr = u

Exports
  data1: Data
    data = dset1
    expr = u
    unit = 1
    descr = Dependent variable u
    filename = /home/arun/Desktop/Software_tools_practice/poissondata.txt
    location = grid
    gridx2 = range(0,(lx-0)/19,lx)
    gridy2 = range(0,(ly-0)/29,ly)