// COMSOL Multiphysics 5.4.0.225 model "task3.mph"
// Outline of the model tree

Parameters
  width = 10[cm]
  height = 8[cm]
  alpha = 5[m^2/s]

Geometry
  geom1 "Geometry 1" (2D, length unit m)
    r1: Rectangle | size = {width, height}
    fin: Finalize "Form Union"

Physics
  c: CoefficientFormPDE on all domains
    dependent variable u
    Units.DependentVariableQuantity = none
    Units.CustomDependentVariableUnit = K
    Units.CustomSourceTermUnit = K/s
    cfeq1: CoefficientFormPDE (default) | c = {1, 0, 0, 1}; f = 0; da = 1
    zflx1: ZeroFluxBoundary "Zero Flux 1" (default)
    init1: init "Initial Values 1" (default) | u = 350
    dir2: DirichletBoundary "Dirichlet Boundary Condition 2" on boundaries 1 | r = 400
    dir3: DirichletBoundary "Dirichlet Boundary Condition 3" on boundaries 4 | r = 250
    flux1: FluxBoundary "Flux/Source 1" on boundaries 3 | g = -2000

Mesh
  mesh1 "Mesh 1" (physics-controlled)

Studies
  std1 "Study 1"
    time: Transient "Time Dependent" | tlist = range(0,0.1,1)

Solver configurations
  sol1 "Solution 1" (study std1)
    v1: Variables "Dependent Variables 1"
    t1: Time "Time-Dependent Solver 1" | tlist = range(0,0.1,1)
      dDef: Direct
      fc1: FullyCoupled | linsolver = dDef

Datasets
  dset1: Solution | solution = sol1

Plots
  pg1: PlotGroup2D "2D Plot Group 1" | data = dset1
    surf1: Surface | expr = u

Exports
  data1: Data "heatdata" | data = dset1; expr = u; filename = /home/arun/Desktop/Software_tools_practice/heatdata.txt